*Heading
** Job name: Job-1 Model name: Model-1
** Generated by: Abaqus/CAE 2023
*Preprint, echo=NO, model=NO, history=NO, contact=NO
**
** PARTS
**
*Part, name=film
*Node
      1,         -7.5,           0.,          1.5
      2,          7.5,           0.,          1.5
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*Element, type=C3D8RH
   1,  124,  265,    9,    1, 1555, 1696, 1440, 1432
   2,  265,  266,   10,    9, 1696, 1697, 1441, 1440
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*Nset, nset=Set-film, generate
    1,  5724,     1
*Elset, elset=Set-film, generate
    1,  4074,     1
*Elset, elset=_s_Surf-1_S2, internal, generate
 2717,  4074,     1
*Surface, type=ELEMENT, name=s_Surf-1
_s_Surf-1_S2, S2
** Section: pdms-section
*Solid Section, elset=Set-film, material=pdms
,
*End Part
**
*Part, name=solid-object
*Node
      1,           0., 0.0900000036,         -1.5
      2,           0.,   1.84050536,   1.20454776
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*Element, type=R3D4
 1,  1, 18, 40, 19
 2, 18, 17, 41, 40
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*Element, type=R3D3
47, 90, 30, 29
78, 158, 150, 147
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*Node
    207, 7.37572799e-17,   1.84050536,           0.
*Nset, nset=solid-object-RefPt_, internal
207,
*Elset, elset=_m_Surf-1_SPOS, internal, generate
   1,  209,    1
*Surface, type=ELEMENT, name=m_Surf-1
_m_Surf-1_SPOS, SPOS
*Elset, elset=solid-object, generate
   1,  209,    1
*End Part
**
**
** ASSEMBLY
**
*Assembly, name=Assembly
**
*Instance, name=film-1, part=film
*End Instance
**
*Instance, name=solid-object-1, part=solid-object
          0.,     2.901754,          13.
*End Instance
**
*Nset, nset=Set-1, instance=film-1
    1,    2,    3,    4,    5,    6
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*Elset, elset=Set-1, instance=film-1, generate
  901,  1358,     1
*Nset, nset=Set-2, instance=solid-object-1
  4, 34, 35, 36
*Elset, elset=Set-2, instance=solid-object-1
 46,
*Nset, nset=Set-contact, instance=film-1, generate
 4294,  5724,     1
*Elset, elset=Set-contact, instance=film-1, generate
 2717,  4074,     1
*Rigid Body, ref node=solid-object-1.solid-object-RefPt_, elset=solid-object-1.solid-object
*End Assembly
**
** MATERIALS
**
*Material, name=pdms
*Hyperelastic, n=2
 -0.697, 1.08,   0., 2.52,   0.,   0.,   0.
**
** INTERACTION PROPERTIES
**
*Surface Interaction, name=IntProp-1
1.,
*Surface Behavior, pressure-overclosure=HARD
**
** INTERACTIONS
**
** Interaction: Int-1
*Contact Pair, interaction=IntProp-1, type=SURFACE TO SURFACE
film-1.s_Surf-1, solid-object-1.m_Surf-1
** ----------------------------------------------------------------
**
** STEP: Step-1
**
*Step, name=Step-1, nlgeom=YES, inc=1000
*Static
0.01, 1., 1e-15, 1.
**
** BOUNDARY CONDITIONS
**
** Name: BC-1 Type: 对称/反对称/完全固定
*Boundary
Set-1, ENCASTRE
** Name: BC-2 Type: 位移/转角
*Boundary
Set-2, 1, 1
Set-2, 2, 2, -1.5
Set-2, 3, 3
Set-2, 4, 4
Set-2, 5, 5
Set-2, 6, 6
**
** OUTPUT REQUESTS
**
*Restart, write, frequency=0
**
** FIELD OUTPUT: F-Output-1
**
*Output, field, time interval=0.01
*Node Output
CF, RF, U
*Element Output, directions=YES
LE, PE, PEEQ, PEMAG, S
*Contact Output
CDISP, CFORCE, CSTRESS
**
** HISTORY OUTPUT: H-Output-1
**
*Output, history, variable=PRESELECT
*End Step
